# OpenSim document version 40000
ControlSet BasicShoulderComplex_withForces_Default:
  ControlLinear shoulder_elv_actuator: is_model_control=true extrapolate=true default_min=0 default_max=1
      filter_on=false use_steps=false kp=100 kv=20
    x_nodes:
      ControlLinearNode: t=0 value=0
      ControlLinearNode: t=20 value=0
  ControlLinear shoulder_rot_actuator: is_model_control=true extrapolate=true default_min=0 default_max=1
      filter_on=false use_steps=false kp=100 kv=20
    x_nodes:
      ControlLinearNode: t=0 value=-1
      ControlLinearNode: t=20 value=-1
